*Heading
** Job name: Lean-model Model name: Model-5-lean-linearsoft
** Generated by: Abaqus/CAE Learning Edition 2025
*Preprint, echo=NO, model=NO, history=NO, contact=NO
**
** PARTS
**
*Part, name=dbeam
*Node
      1,   826.732483,           0.
      2,   826.732483,         250.
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*Element, type=CPS4R
  1,   1,  15, 185,  62
  2,  15,  16, 186, 185
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*Nset, nset=_PickedSet4, internal, generate
   1,  700,    1
*Elset, elset=_PickedSet4, internal, generate
   1,  637,    1
** Section: conc
*Solid Section, elset=_PickedSet4, material=conc
150.,
*End Part
**
*Part, name=reinf
*Node
      1,           0.,           0.
      2,         100.,           0.
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*Element, type=T2D2
 1,  1,  2
 2,  2,  3
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*Nset, nset=_PickedSet4, internal, generate
  1,  21,   1
*Elset, elset=_PickedSet4, internal, generate
  1,  20,   1
** Section: reinf10
*Solid Section, elset=_PickedSet4, material=reinf
235.619,
*End Part
**
*Part, name=reinf12
*Node
      1,           0.,           0.
      2,         100.,           0.
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*Element, type=T2D2
 1,  1,  2
 2,  2,  3
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*Nset, nset=_PickedSet4, internal, generate
  1,  21,   1
*Elset, elset=_PickedSet4, internal, generate
  1,  20,   1
** Section: reinf12
*Solid Section, elset=_PickedSet4, material=reinf
339.293,
*End Part
**
**
** ASSEMBLY
**
*Assembly, name=Assembly
**
*Instance, name=dbeam-1, part=dbeam
*End Instance
**
*Instance, name=reinf-1, part=reinf
          0.,          {{c_nom_bottom}},           0.
*End Instance
**
*Instance, name=reinf12-1, part=reinf12
          0.,         {{c_nom_top}},           0.
*End Instance
**
*Nset, nset=Loading_Point, instance=dbeam-1
 11,
*Nset, nset=_PickedSet15, internal, instance=dbeam-1
 3,
*Nset, nset=_PickedSet16, internal, instance=dbeam-1
 8,
*Nset, nset=_PickedSet17, internal, instance=dbeam-1
 11,
*Nset, nset=_PickedSet26, internal, instance=reinf-1, generate
  1,  21,   1
*Nset, nset=_PickedSet26, internal, instance=reinf12-1, generate
  1,  21,   1
*Elset, elset=_PickedSet26, internal, instance=reinf-1, generate
  1,  20,   1
*Elset, elset=_PickedSet26, internal, instance=reinf12-1, generate
  1,  20,   1
*Nset, nset=_PickedSet27, internal, instance=dbeam-1, generate
   1,  700,    1
*Elset, elset=_PickedSet27, internal, instance=dbeam-1, generate
   1,  637,    1
** Constraint: Constraint-1
*Embedded Element, host elset=_PickedSet27
_PickedSet26
*End Assembly
**
** MATERIALS
**
*Material, name=conc
*Elastic
{{E_CONCRETE}}, 0.2
*Concrete Damaged Plasticity
30.,    0.1,   1.16,  0.667, 0.0008
*Concrete Compression Hardening
{{COMP_HARDENING_TABLE}}
*Concrete Tension Stiffening
{{TENSION_STIFFENING_TABLE}}
*Concrete Compression Damage
     0.,      0.
 0.0526, 0.00167
  0.105, 0.00208
  0.158, 0.00249
  0.211, 0.00289
  0.263,  0.0033
  0.316, 0.00371
  0.368, 0.00411
  0.421, 0.00452
  0.474, 0.00493
  0.526, 0.00534
  0.579, 0.00574
  0.632, 0.00615
  0.684, 0.00656
  0.737, 0.00696
  0.789, 0.00737
  0.842, 0.00778
  0.895, 0.00819
  0.947, 0.00859
*Concrete Tension Damage
     0.,       0.
 0.0375, 1.45e-05
  0.075, 2.89e-05
  0.113, 4.34e-05
   0.15, 5.78e-05
  0.187, 7.23e-05
  0.225, 8.67e-05
  0.262, 0.000101
    0.3, 0.000116
  0.337,  0.00013
  0.375, 0.000145
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  0.988,  0.00217
*Material, name=reinf
*Elastic
210000., 0.3
*Plastic
500.,    0.
520., 0.015
**
** BOUNDARY CONDITIONS
**
** Name: BC-1 Type: Displacement/Rotation
*Boundary
_PickedSet15, 1, 1
_PickedSet15, 2, 2
** Name: BC-2 Type: Displacement/Rotation
*Boundary
_PickedSet16, 2, 2
** ----------------------------------------------------------------
**
** STEP: Step-1
**
*Step, name=Step-1, nlgeom=YES, inc=10000000
*Static
0.001, 1., 1e-09, 0.1
**
** BOUNDARY CONDITIONS
**
** Name: BC-3 Type: Displacement/Rotation
*Boundary
_PickedSet17, 2, 2, -20.
**
** OUTPUT REQUESTS
**
*Restart, write, frequency=0
**
** FIELD OUTPUT: F-Output-1
**
*Output, field, time interval=0.005, time marks=NO
*Node Output
RF, U
*Element Output, directions=YES
DAMAGEC, DAMAGET, PE, PEEQ, PEMAG, S, SDEG
**
** HISTORY OUTPUT: H-Output-1
**
*Output, history
*Node Output, nset=Loading_Point
RF2, U2
*End Step
